// COMSOL Multiphysics 6.2.0.339 model "2D_Coils_ACDC_N300_freq.mph"
// Self-Inductance and Mutual Inductance of a Single Conductor and a Homogenized Helical Coil
// The mutual inductance and induced currents between a single-turn primary and twenty-turn secondary coil in a concentric coplanar arrangement is computed using a frequency-domain model. The secondary coil is modeled using a homogenized approach which does not explicitly consider each turn of the coil. The results are compared against analytic predictions.
// Outline of the model tree

Parameters
  r_wire = 1[mm]  // Radius, wire
  R1 = 100[mm]  // Radius, outer coil
  R2 = 10[mm]  // Radius, inner coil
  N = 20  // Number of turns in secondary
  M = N*(mu0_const*pi*R2^2)/(2*R1)  // Analytic mutual inductance in secondary
  I1 = 1[A]  // Current, outer coil
  I2 = 0[A]  // Current, inner coil

Coordinate systems
  ie1: InfiniteElement "Infinite Element Domain 1" on no domains

Geometry
  geom1 "Geometry 1" (2D axisymmetric, length unit m)
    air: Rectangle | pos = {0, -15[mm]}; size = {30[mm], 50[mm]}
    coil1: Rectangle | pos = {8[mm], 5[mm]}; size = {2[mm], 10[mm]}
    coil2: Rectangle | pos = {18[mm], 5[mm]}; size = {2[mm], 10[mm]}
    fin: Finalize "Form Union"

Materials
  mat1: Common "Air" on domains 1
    def "Basic"
      thermalexpansioncoefficient = alpha_p(pA,T)
      molarmass = 0.02897[kg/mol]
      bulkviscosity = muB(T)
      relpermeability = 1
      relpermittivity = 1
      dynamicviscosity = eta(T)
      ratioofspecificheat = 1.4
      electricconductivity = 0[S/m]
      heatcapacity = Cp(T)
      density = rho(pA,T)
      thermalconductivity = k(T)
      soundspeed = cs(T)
      eta: Piecewise | arg = T; pieces = {200.0, 1600.0, -8.38278E-7+8.35717342E-8*T^1-7.69429583E-11*T^2+4.6437266E-14*T^3-1.06585607E-17*T^4}; argunit = K; fununit = Pa*s
      Cp: Piecewise | arg = T; pieces = {200.0, 1600.0, 1047.63657-0.372589265*T^1+9.45304214E-4*T^2-6.02409443E-7*T^3+1.2858961E-10*T^4}; argunit = K; fununit = J/(kg*K)
      rho: Analytic | expr = pA*0.02897/R_const[K*mol/J]/T; args = {pA, T}; fununit = kg/m^3; argunit = {Pa, K}
      k: Piecewise | arg = T; pieces = {200.0, 1600.0, -0.00227583562+1.15480022E-4*T^1-7.90252856E-8*T^2+4.11702505E-11*T^3-7.43864331E-15*T^4}; argunit = K; fununit = W/(m*K)
      cs: Analytic | expr = sqrt(1.4*R_const[K*mol/J]/0.02897*T); args = T; fununit = m/s; argunit = K
      an1: Analytic | funcname = alpha_p; expr = -1/rho(pA,T)*d(rho(pA,T),T); args = {pA, T}; fununit = 1/K; argunit = {Pa, K}
      an2: Analytic "Analytic 2a" | funcname = muB; expr = 0.6*eta(T); args = T; fununit = Pa*s; argunit = K
    RefractiveIndex
      n = 1
      ki = 0
    NonlinearModel
      BA = def.gamma-1
    idealGas
      Rs = R_const/Mn
      heatcapacity = Cp(T)
      ratioofspecificheat = 1.4
      molarmass = 0.02897
      Cp: Piecewise | arg = T; pieces = {200.0, 1600.0, 1047.63657-0.372589265*T^1+9.45304214E-4*T^2-6.02409443E-7*T^3+1.2858961E-10*T^4}; argunit = K; fununit = J/(kg*K)
  mat2: Common "Copper" on domains 2, 3
    def "Basic"
      relpermeability = 1
      electricconductivity = 5.998e7[S/m]
      heatcapacity = 385[J/(kg*K)]
      relpermittivity = 1
      emissivity = 0.5
      density = 8940[kg/m^3]
      thermalconductivity = 400[W/(m*K)]
    Enu "Young's modulus and Poisson's ratio"
      E = 126e9[Pa]
      nu = 0.34
    linzRes "Linearized resistivity"
      rho0 = 1.667e-8[ohm*m]
      alpha = 3.862e-3[1/K]
      Tref = 293.15[K]

Physics
  mf: InductionCurrents "Magnetic Fields" on all domains
    dependent variable A = {Ar, Aphi, Az}
    fsp1: FreeSpace (default)
    axi1: AxialSymmetry (default)
    mi1: MagneticInsulation (default)
    init1: init "Initial Values 1" (default)
    coil1: Coil on domains 2 | ConductorModel = Multi; CoilExcitation = Current; ICoil = 1[A]; N = 300; T = 293.15[K]
    coil2: Coil on domains 3 | ConductorModel = Multi; CoilExcitation = Current; ICoil = -1[A]; N = 300; T = 293.15[K]

Mesh
  mesh1 "Mesh 1" (physics-controlled)

Studies
  std1 "Study 1"
    stat: Stationary
  std2 "Study 2"
    stat: Stationary
  std3 "Study 3"
    freq: Frequency "Frequency Domain" | plist = 1[kHz]
  std4 "Study 4"
    freq: Frequency "Frequency Domain" | plist = 1[kHz]

Solver configurations
  sol1 "Solution 1" (study std1)
    v1: Variables "Dependent Variables 1"
    s1: Stationary "Stationary Solver 1"
      dDef: Direct
      fc1: FullyCoupled | linsolver = dDef
  sol2 "Solution 2" (study std2)
    // same settings as sol1
  sol3 "Solution 3" (study std3)
    v1: Variables "Dependent Variables 1"
    s1: Stationary "Stationary Solver 1" | linpmethod = sol
      dDef: Direct
      p1: Parametric | pname = freq; plistarr = 1[kHz]; punit = Hz; pcontinuationmode = no
      fc1: FullyCoupled | linsolver = dDef
  sol4 "Solution 4" (study std4)
    // same settings as sol3

Datasets
  dset1: Solution | solution = sol1
  dset2: Solution | solution = sol2
  cln1: CutLine2D | data = dset2; genpoints = {{0, 0}, {R2, 0}}
  cln2: CutLine2D | data = dset2; genpoints = {{0, 0}, {R1, 0}}
  dset3: Solution | solution = sol3
  dset4: Solution | solution = sol4

Derived values
  gev1: EvalGlobal "Global Evaluation 1"
    data = dset1
    table = tbl1
    expr = {mf.LCoil_1, 2*mf.intWm/1[A^2], mf.L_2_1, M}
    unit = {, nH, , nH}
    descr = {External coil inductance, Energy estimate for external coil inductance, Computed mutual inductance, Analytical mutual inductance}
  gev2: EvalGlobal "Global Evaluation 2"
    data = dset2
    table = tbl2
    expr = {mf.LCoil_2, 2*mf.intWm/1[A^2], mf.L_1_2, M}
    unit = {nH, nH, , nH}
    descr = {Internal coil inductance, Energy estimate for internal coil inductance, Computed mutual inductance, Analytical mutual inductance}
  int1: IntLine "Line Integration 1" | data = cln1; table = tbl3; expr = 20*mf.Bz/I2; unit = nH; intsurface = on
  int2: IntLine "Line Integration 2" | data = cln2; table = tbl3; expr = mf.Bz/I2; unit = nH; intsurface = on
  gev3: EvalGlobal "Global Evaluation 3" | data = dset3; table = tbl4; expr = mf.VCoil_2/1[A]/mf.iomega; unit = nH
  gev4: EvalGlobal "Global Evaluation 4"
    data = dset4
    table = tbl5
    expr = {mf.ICoil_2, -mf.iomega*withsol('sol1',mf.L_2_1)/(withsol('sol2',mf.RCoil_2)+withsol('sol2',mf.LCoil_2)*mf.iomega)*mf.ICoil_1}

Tables
  tbl1: Table
    // Global Evaluation 1
    External coil inductance (nH) | Energy estimate for external coil inductance (nH) | Computed mutual inductance (nH) | Analytical mutual inductance (nH)
    619.443 | 619.443 | 40.008 | 39.4784
  tbl2: Table
    // Global Evaluation 2
    Internal coil inductance (nH) | Energy estimate for internal coil inductance (nH) | Computed mutual inductance (nH) | Analytical mutual inductance (nH)
    3411.85 | 3411.85 | 40.008 | 39.4784
  tbl3: Table
    // Line Integration 1
    20*mf.Bz/I1 (nH) | mf.Bz/I1 (nH) | 20*mf.Bz/I2 (nH) | mf.Bz/I2 (nH)
    39.5945 | 650.863 | 4026.01 | 40.0075
  tbl4: Table
    // Global Evaluation 3
    freq (Hz) | mf.VCoil_2/1[A]/mf.iomega (nH)
    1000 | 40.0081+0.000645532i
  tbl5: Table
    // Global Evaluation 4
    freq (Hz) | Coil current (A) | -mf.iomega*withsol('sol1',mf.L_2_1)/(withsol('sol2',mf.RCoil_2)+withsol('sol2',mf.LCoil_2)*mf.iomega)*mf.ICoil_1 (A)
    1000 | -0.0106921-0.00332527i | -0.0106922-0.0033251i

Plots
  pg1: PlotGroup2D "2D Plot Group 1" | data = dset3
    str1: Streamline
      expr = {mf.Br, mf.Bz}
      startmethod = coord
      xcoord = range(0,0.9*R1/49,0.9*R1)
      ycoord = 0
      linetype = tube
      col1: Color "Color Expression 1" | expr = mf.normB
  pg2: PlotGroup2D "2D Plot Group 2" | data = dset4
    str1: Streamline
      expr = {mf.Br, mf.Bz}
      startmethod = coord
      xcoord = range(0,0.9*R1/49,0.9*R1)
      ycoord = 0
      linetype = tube
      col1: Color "Color Expression 1" | expr = mf.normB
  pg3: PlotGroup2D "Magnetic Flux Density" | data = dset1
    sp1: Surface | expr = mf.normB; unit = T
  pgC: PlotGroup2D "B Field" | data = dset1
    srf1: Surface | expr = mf.normB; unit = T

Exports
  exp1: Image
  imgB: Image | width = 1280; height = 960